a := 0
b := 2.5
t := 1 .. 21
integral((1 + 2*x)/((2 + x)*sqrt(2 + x)), x = a .. b) → 1.41421356237
f(x) := (1 + 2*x)/((2 + x)*sqrt(2 + x))
integral((1 + 2*x)/((2 + x)*sqrt(2 + x)), x) → 2*(2*x + 7)/sqrt(x + 2)
fa(x) := (4*x + 14)/sqrt(x + 2)
calc := fa(b) - fa(a) = 1.41421
H := transpose([0.0659722, 0.2604166, 0.1736111, 0.1736111, 0.2604166, 0.0659722])
X := transpose([0.0469101, 0.2307653, 0.5, 0.7692347, 0.9530899])
A := transpose([0.1184634, 0.2393143, 0.2844444, 0.2393143, 0.1184634])
func(b, a, n) :=
    h ← (b - a)/5
    (b - a)*sum(H[i]*f(a + i*h), i = 0 .. 5)
gauss(b, a, n) :=
    h ← (b - a)/n
    x[0] ← a
    for j ∈ 1 .. n
        x[j] ← x[j - 1] + h
    res ← h*sum(sum(A[i - 1]*f(x[j - 1] + X[i - 1]*h), i = 1 .. 5), j = 1 .. n)
    return res
newton_kotess(b, a, n) :=
    h ← (b - a)/n
    for i ∈ 0 .. n - 1
        res ← res + func(a + h*(i + 1), a + h*i, n)
    res
gauss(b, a, 1) = 1.41421
newton_kotess(b, a, 1) = 1.41401
test_neweton_kotess :=
    for i ∈ 1 .. 21
        res[i] ← newton_kotess(b, a, i)
    return res
test_gauss :=
    for i ∈ 1 .. 21
        res[i] ← gauss(b, a, i)
    return res
h :=
    for i ∈ 0 .. 19
        h[i] ← ns_h(i + 1)
    h  # error: Эта переменная не определена.
ns_h(n) :=
    h ← (b - a)/n
    h
h :=
    for i ∈ 0 .. 19
        h[i] ← ns_h(i + 1)
    h
test_gauss = [0; 1.41421; 1.41421; 1.41421; 1.41421; 1.41421; 1.41421; 1.41421; 1.41421; 1.41421; 1.41421; 1.41421; 1.41421; 1.41421; 1.41421; 1.41421; 1.41421; 1.41421; 1.41421; 1.41421; 1.41421; 1.41421]
test_neweton_kotess = [0; 1.41401; 1.41421; 1.41421; 1.41421; 1.41421; 1.41421; 1.41421; 1.41421; 1.41421; 1.41421; 1.41421; 1.41421; 1.41421; 1.41421; 1.41421; 1.41421; 1.41421; 1.41421; 1.41421; 1.41421; 1.41421]
newton_kotess_step_size :=
    for i ∈ 0 .. 19
        res[i] ← |newton_kotess(b, a, i + 1) - calc|
    return res
gauss_step_size :=
    for i ∈ 0 .. 19
        res[i] ← |gauss(b, a, i + 1) - calc|
    return res
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